// COMSOL Multiphysics 5.6.0.280 model "2d_rectangle.mph"
// Outline of the model tree

Geometry
  geom1 "Geometry 1" (2D, length unit m)
    r1: Rectangle | size = {1, 3}
    fin: Finalize "Form Union"

Materials
  mat1: Common "Copper" on all domains
    def "Basic"
      relpermeability = 1
      electricconductivity = 5.998e7[S/m]
      heatcapacity = 385[J/(kg*K)]
      relpermittivity = 1
      emissivity = 0.5
      density = 8940[kg/m^3]
      thermalconductivity = 400[W/(m*K)]
    Enu "Young's modulus and Poisson's ratio"
      youngsmodulus = 126e9[Pa]
      poissonsratio = 0.34
    linzRes "Linearized resistivity"
      rho0 = 1.667e-8[ohm*m]
      alpha = 3.862e-3[1/K]
      Tref = 293.15[K]

Physics
  es: Electrostatics on all domains
    dependent variable V
    ccn1: ChargeConservation (default)
    zc1: ZeroCharge (default)
    init1: init "Initial Values 1" (default)
    term1: Terminal on boundaries 3 | TerminalType = Voltage; V0 = 2.7
    term2: Terminal on boundaries 2 | TerminalType = Voltage; V0 = 4
    term3: Terminal on boundaries 4 | TerminalType = Voltage; V0 = 2
    term4: Terminal on boundaries 1 | TerminalType = Voltage; V0 = 0

Mesh
  mesh1 "Mesh 1"
    size: MeshSizeDefault | hmax = 0.201; hmin = 9.0E-4; hcurve = 0.3; hgrad = 1.3
    fq1: FreeQuad on remaining entities
      size1: Size on entire geometry

Studies
  std1 "Study 1"
    stat: Stationary

Solver configurations
  sol1 "Solution 1" (study std1)
    v1: Variables "Dependent Variables 1"
    s1: Stationary "Stationary Solver 1"
      dDef: Direct
      fc1: FullyCoupled | linsolver = dDef
    a1: Assemble | K = on; M = on

Datasets
  dset1: Solution | solution = sol1
  mesh1: Mesh | mesh = mesh1

Derived values
  sys1: SystemMatrix | table = tbl1; solution = sol1

Tables
  tbl1: Table
    // System Matrix 1
    Row | Column | Value
    1 | 1 | -5.50927e-12
    2 | 1 | 1.77084e-12
    3 | 1 | 2.9514e-13
    4 | 1 | 2.9514e-13
    5 | 1 | 1.77084e-12
    8 | 1 | 3.14816e-12
    9 | 1 | -9.83799e-13
    10 | 1 | -9.83799e-13
    11 | 1 | 1.9676e-13
    1 | 2 | 1.77084e-12
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
Plots
  pg1: PlotGroup2D "Electric Potential (es)" | data = dset1
    surf1: Surface | expr = V; unit = V; descr = Electric potential
  pg6: PlotGroup2D "2D Plot Group 6" | data = none
  pg7: PlotGroup2D "2D Plot Group 7" | data = none
    tbls1: TableSurface | table = tbl1