// COMSOL Multiphysics 5.6.0.280 model "cylinder.mph"
// Outline of the model tree

Parameters
  radius = 1 [cm]
  height = 5 [cm]

Geometry
  geom1 "Geometry 1" (3D, length unit mm)
    cyl1: Cylinder | r = radius; h = height
    fin: Finalize "Form Union"

Materials
  mat1: Common "Copper" on all domains
    def "Basic"
      relpermeability = 1
      electricconductivity = 5.998e7[S/m]
      heatcapacity = 385[J/(kg*K)]
      relpermittivity = 1
      emissivity = 0.5
      density = 8940[kg/m^3]
      thermalconductivity = 400[W/(m*K)]
    Enu "Young's modulus and Poisson's ratio"
      youngsmodulus = 126e9[Pa]
      poissonsratio = 0.34
    linzRes "Linearized resistivity"
      rho0 = 1.667e-8[ohm*m]
      alpha = 3.862e-3[1/K]
      Tref = 293.15[K]

Physics
  es: Electrostatics on all domains
    dependent variable V
    ccn1: ChargeConservation (default)
    zc1: ZeroCharge (default)
    init1: init "Initial Values 1" (default) | V = 0
    pot1: ElectricPotential on boundaries 4 | V0 = 3
    pot2: ElectricPotential on boundaries 3

Mesh
  mesh1 "Mesh 1"
    size: MeshSizeDefault | hmax = 25; hmin = 3.5; hnarrow = 0.1; hgrad = 2; hauto = 9
    dis1: Distribution on no domains
    bl1: BndLayer "Boundary Layers 1" on boundaries 4
      blp: BndLayerProp "Boundary Layer Properties" on no edges
    swe1: Sweep "Swept 1" on remaining entities
      dis1: Distribution on domains 1 | numelem = 3

Studies
  std1 "Study 1"
    stat: Stationary

Solver configurations
  sol1 "Solution 1" (study std1)
    v1: Variables "Dependent Variables 1"
    s1: Stationary "Stationary Solver 1"
      fc1: FullyCoupled | linsolver = i1
      i1: Iterative | linsolver = cg
        mg1: Multigrid | prefun = amg

Datasets
  dset1: Solution | solution = sol1
  cpl1: CutPlane "yz-plane" | data = dset1

Plots
  pg1: PlotGroup3D "Electric Potential (es)" | data = dset1
    mslc1: Multislice | expr = V
  pg2: PlotGroup2D "2D Plot Group 2" | data = cpl1
    surf1: Surface | expr = comp1.V

Exports
  data1: Data
    data = cpl1
    expr = V
    unit = V
    descr = Electric potential
    filename = /home/michaelm/Desktop/cylinder/xyz_V.dat